! Unit system DS_SOLV_NMM
! GUID 19268e41-32e2-4d0f-be80-e079b8386f35
! Material 1 = Epoxy Carbon UD (230 GPa) Wet
MP,DENS,1,1.518e-09,	! tonne mm^-3
MP,EX,1,123340,	! tonne s^-2 mm^-1
MP,EY,1,7780,	! tonne s^-2 mm^-1
MP,EZ,1,7780,	! tonne s^-2 mm^-1
MP,PRXY,1,0.27,
MP,PRYZ,1,0.42,
MP,PRXZ,1,0.27,
MP,GXY,1,5000,	! tonne s^-2 mm^-1
MP,GYZ,1,3080,	! tonne s^-2 mm^-1
MP,GXZ,1,5000,	! tonne s^-2 mm^-1

TB,FCLI,1,1,9,2
TBDATA,1,0.0143,-0.006,0.0026,-0.0146,0.0026,-0.0146
TBDATA,7,0.016,0.012
MP,ALPX,1,-4.5e-07,	! C^-1
MP,ALPY,1,3e-05,	! C^-1
MP,ALPZ,1,3e-05,	! C^-1

TB,FCLI,1,1,20,1
TBDATA,1,1632
TBDATA,2,-704
TBDATA,3,34
TBDATA,4,-68
TBDATA,5,34
TBDATA,6,-68
TBDATA,7,80
TBDATA,8,55
TBDATA,9,80
TBDATA,10,-1
TBDATA,11,-1
TBDATA,12,-1
TBDATA,13,0.35
TBDATA,14,0.3
TBDATA,15,0.25
TBDATA,16,0.25
TBDATA,17,0.35
TBDATA,18,0.28
TBDATA,19,0.79
TBDATA,20,53
MP,UVID,1,19268e41-32e2-4d0f-be80-e079b8386f35
MP,UMID,1,a2030d46-3978-4e53-8903-17b9abcde804

! GUID 055c4e65-95eb-4723-9dd0-f602466a6aec
! Material 2 = Epoxy E-Glass Wet
MP,DENS,2,1.85e-09,	! tonne mm^-3
MP,EX,2,35000,	! tonne s^-2 mm^-1
MP,EY,2,9000,	! tonne s^-2 mm^-1
MP,EZ,2,9000,	! tonne s^-2 mm^-1
MP,PRXY,2,0.28,
MP,PRYZ,2,0.4,
MP,PRXZ,2,0.28,
MP,GXY,2,4700,	! tonne s^-2 mm^-1
MP,GYZ,2,3500,	! tonne s^-2 mm^-1
MP,GXZ,2,4700,	! tonne s^-2 mm^-1

TB,FCLI,2,1,9,2
TBDATA,1,0.0244,-0.015,0.0038,-0.0125,0.0038,-0.0125
TBDATA,7,0.015,0.012
MP,ALPX,2,5.5e-06,	! C^-1
MP,ALPY,2,2.5e-05,	! C^-1
MP,ALPZ,2,2.5e-05,	! C^-1

TB,FCLI,2,1,20,1
TBDATA,1,780
TBDATA,2,-480
TBDATA,3,31
TBDATA,4,-100
TBDATA,5,31
TBDATA,6,-100
TBDATA,7,60
TBDATA,8,35
TBDATA,9,60
TBDATA,10,-1
TBDATA,11,-1
TBDATA,12,-1
TBDATA,13,0.3
TBDATA,14,0.25
TBDATA,15,0.2
TBDATA,16,0.2
MP,UVID,2,055c4e65-95eb-4723-9dd0-f602466a6aec
MP,UMID,2,6c403223-3647-494f-a1c3-c4abcdc714a8

! GUID cdcfb11a-40f1-404a-b4a2-1519c572084f
! Material 3 = Epoxy Carbon Woven (230 GPa) Wet
MP,DENS,3,1.451e-09,	! tonne mm^-3
MP,EX,3,59160,	! tonne s^-2 mm^-1
MP,EY,3,59160,	! tonne s^-2 mm^-1
MP,EZ,3,7500,	! tonne s^-2 mm^-1
MP,PRXY,3,0.04,
MP,PRYZ,3,0.3,
MP,PRXZ,3,0.3,
MP,GXY,3,3300,	! tonne s^-2 mm^-1
MP,GYZ,3,2700,	! tonne s^-2 mm^-1
MP,GXZ,3,2700,	! tonne s^-2 mm^-1

TB,FCLI,3,1,9,2
TBDATA,1,0.0092,-0.0084,0.0092,-0.0084,0.0078,-0.011
TBDATA,7,0.02,0.015
MP,ALPX,3,2.2e-06,	! C^-1
MP,ALPY,3,2.2e-06,	! C^-1
MP,ALPZ,3,1e-05,	! C^-1

TB,FCLI,3,1,20,1
TBDATA,1,513
TBDATA,2,-437
TBDATA,3,513
TBDATA,4,-437
TBDATA,5,50
TBDATA,6,-150
TBDATA,7,120
TBDATA,8,55
TBDATA,9,55
TBDATA,10,-1
TBDATA,11,-1
TBDATA,12,-1
MP,UVID,3,cdcfb11a-40f1-404a-b4a2-1519c572084f
MP,UMID,3,7ab9c060-4547-4561-aab3-d3fd3c4952ed

! GUID f3def19b-9a9d-42f0-81f3-a63d9a343466
! Material 4 = Resin Epoxy
MP,DENS,4,1.16e-09,	! tonne mm^-3
MP,EX,4,3780,	! tonne s^-2 mm^-1
MP,NUXY,4,0.35,
MP,UVID,4,f3def19b-9a9d-42f0-81f3-a63d9a343466
MP,UMID,4,c99988b7-2dbb-450c-aef4-ecfe41eeb382
